// SBML level 2 version 1

model Novak2001_FissionYeast_CellCycle()
  // The model reproduces the time evolution of several species as depicted in Fig 4 of the paper. Events have been used to reset cell mass when the value of M-phase promoting factor (MPF) decreases through 0.1. The model was successfully tested on Cell Designer.
  // This model originates from BioModels Database: A Database of Annotated Published Models. It is copyright (c) 2005-2006 The BioModels Team.
  // For more information see the terms of use.

  // Compartments:
  compartment cell = 1;

  // Species:
  substanceOnly species cdc13T in cell = 0.2; cdc13T is "Total cdc13";
  substanceOnly species preMPF in cell = 0;
  substanceOnly species ste9 in cell = 1;
  substanceOnly species slp1T in cell = 0;
  substanceOnly species slp1 in cell = 2.2;
  substanceOnly species IEP in cell = 0;
  substanceOnly species rum1T in cell = 0;
  substanceOnly species SK in cell = 0;
  substanceOnly species M in cell = 1; M is "Cell Mass";
  substanceOnly species MPF in cell; MPF is "M-phase promoting factor";

  // Parameters:
  flag_MPF = 0 dimensionless;
  sigma has dimensionless;
  Kdiss = 0.001 dimensionless;
  Trimer has dimensionless;
  TF has dimensionless;
  k15 = 1.5 min_inv;
  J16 = 0.01 dimensionless;
  k16_prime = 1 min_inv;
  k16_double_prime = 2 min_inv;
  J15 = 0.01 dimensionless;
  kwee has min_inv;
  kwee_prime = 0.15 min_inv;
  kwee_double_prime = 1.3 min_inv;
  Vawee = 0.25 min_inv;
  Jiwee = 0.01 dimensionless;
  Viwee = 1 min_inv;
  Jawee = 0.01 dimensionless;
  k25 has min_inv;
  k25_prime = 0.05 min_inv;
  k25_double_prime = 5 min_inv;
  Va25 = 1 min_inv;
  Ji25 = 0.01 dimensionless;
  Vi25 = 0.25 min_inv;
  Ja25 = 0.01 dimensionless;
  k1 = 0.03 min_inv;
  k2_prime = 0.03 min_inv;
  k2_double_prime = 1 min_inv;
  k2_triple_prime = 0.1 min_inv;
  k3_prime = 1 min_inv;
  k3_double_prime = 10 min_inv;
  J3 = 0.01 dimensionless;
  k4_prime = 2 min_inv;
  k4 = 35 min_inv;
  J4 = 0.01 dimensionless;
  k5_prime = 0.005 min_inv;
  k5_double_prime = 0.3 min_inv;
  J5 = 0.3 dimensionless;
  k6 = 0.1 min_inv;
  k7 = 1 min_inv;
  J7 = 0.001 dimensionless;
  k8 = 0.25 min_inv;
  J8 = 0.001 dimensionless;
  k9 = 0.1 min_inv;
  J9 = 0.01 dimensionless;
  k10 = 0.04 min_inv;
  J10 = 0.01 dimensionless;
  k11 = 0.1 min_inv;
  k12 = 0.01 min_inv;
  k12_prime = 1 min_inv;
  k12_double_prime = 3 min_inv;
  k13 = 0.1 min_inv;
  k14 = 0.1 min_inv;
  mu = 0.005 min_inv;

  // Assignment rules:
  sigma := cdc13T + rum1T + Kdiss;
  Trimer := 2*cdc13T*rum1T/(sigma + (sigma^2 - 4*cdc13T*rum1T)^0.5);
  MPF := (cdc13T - preMPF)*(cdc13T - Trimer)/cdc13T;
  TF := 2*k15*M*J16/(k16_prime + k16_double_prime*MPF - k15*M + (k16_prime + k16_double_prime*MPF)*J15 + k15*M*J16 + sqrt((k16_prime + k16_double_prime*MPF - k15*M + (k16_prime + k16_double_prime*MPF)*J15 + k15*M*J16)^2 - 4*(k16_prime + k16_double_prime*MPF - k15*M)*k15*M*J16));
  kwee := kwee_prime + (kwee_double_prime - kwee_prime)*(2*Vawee*Jiwee/(Viwee*MPF - Vawee + Viwee*MPF*Jawee + Vawee*Jiwee + sqrt((Viwee*MPF - Vawee + Viwee*MPF*Jawee + Vawee*Jiwee)^2 - 4*(Viwee*MPF - Vawee)*Vawee*Jiwee)));
  k25 := k25_prime + (k25_double_prime - k25_prime)*(2*Va25*MPF*Ji25/(Vi25 - Va25*MPF + Vi25*Ja25 + Va25*MPF*Ji25 + sqrt((Vi25 - Va25*MPF + Vi25*Ja25 + Va25*MPF*Ji25)^2 - 4*(Vi25 - Va25*MPF)*Va25*MPF*Ji25)));

  // Reactions:
  cdc13T_synthesis: => cdc13T; k1*M;  // modifiers: M
  Targeting_cdc13T_to_APC_core: cdc13T => ; (k2_prime + k2_double_prime*ste9 + k2_triple_prime*slp1)*cdc13T;  // modifiers: ste9, slp1
  wee1_dependent_MPF_inactivation: => preMPF; kwee*(cdc13T - preMPF);  // modifiers: cdc13T
  R4: preMPF => ; k25*preMPF; R4 is "cdc25 dependent preMPF phosphorylation";
  preMPF_inactivation: preMPF => ; (k2_prime + k2_double_prime*ste9 + k2_triple_prime*slp1)*preMPF;  // modifiers: ste9, slp1
  slp1_dependent_ste9_activation: => ste9; (k3_prime + k3_double_prime*slp1)*(1 - ste9)/(J3 + 1 - ste9);  // modifiers: slp1
  R7: ste9 => ; (k4_prime*SK + k4*MPF)*ste9/(J4 + ste9); R7 is "ste9 phosphorylation (inactivation) by starter kinase";  // modifiers: SK, MPF
  slp1T_activation_by_MPF: => slp1T; k5_prime + k5_double_prime*MPF^4/(J5^4 + MPF^4);  // modifiers: MPF
  slp1T_inactivation: slp1T => ; k6*slp1T;
  R10: => slp1; k7*IEP*(slp1T - slp1)/(J7 + slp1T - slp1); R10 is "slp1 activation by intermediary enzyme";  // modifiers: IEP, slp1T
  R11: slp1 => ; k8*slp1/(J8 + slp1); R11 is "slp1 inactivation";
  R12: slp1 => ; k6*slp1; R12 is "slp1 inactivation";
  Intermediary_enzyme_activation: => IEP; k9*MPF*(1 - IEP)/(J9 + 1 - IEP);  // modifiers: MPF
  IEP_inactivation: IEP => ; k10*IEP/(J10 + IEP);
  rum1T_activation: => rum1T; k11;
  SK_dependent_rum1T_inactivation: rum1T => ; (k12 + k12_prime*SK + k12_double_prime*MPF)*rum1T;  // modifiers: SK, MPF
  SK_synthesis: => SK; k13*TF;
  SK_degradation: SK => ; k14*SK;
  Cell_growth: => M; mu*M;

  // Events:
  // The two events are used to reset the cell mass (divide by two) when MPF decreases through 0.1
  event_0000001: at ((MPF <= 0.1) && (flag_MPF == 1)): M = M/2, flag_MPF = 0;
  event_0000002: at (MPF > 0.1): flag_MPF = 1;

  // Unit definitions:
  unit time = 60 second; time is "minutes";
  unit min_inv = 1 / (60 second);
end
