// SBML level 2 version 1

function f1(x1)
  x1*x1;
end
f1 is "Heaviside";

model untitled()

  // Compartments:
  compartment default; default is "cytoplasm";
  compartment nucleus in default;

  // Species:
  substanceOnly species $Kinase in default = 0.05;
  species $a5_degraded in default = 0;
  species NFkB_default in default = 0;
  species NFkB_nucleus in nucleus = 0;
  species s14 in default; s14 is "IkB_alpha";
  species IkB_alpha_nucleus in nucleus = 0;
  // Some comment PMID: 11112222
  species NFkB_IkB_alpha in default = 1; NFkB_IkB_alpha is "NFkB/IkB_alpha";
  species catalyst in default = 0;
  species s20 in default = 0; s20 is "IkB_alpha";
  species simple in default = 0;
  species sa9_degraded in default = 0;
  species s24 in default = 0; s24 is "IkB_alpha";
  species s25 in default = 0;
  species s30 in default = 0; s30 is "Erk8";
  species Some in default = 0;
  species s32 in default = 0; s32 is "Erk8";
  species s33 in default = 0; s33 is "Erk8";

  // Assignment rules:
  s14 := s5*s5;
  nucleus := s6*10;
  p1 := s14*20;

  // Rate rules:
  s1' = k1*k2;
  c2' = g2g2;
  s14' = fff;

  // Algebraic rules:
  0 = s5 > 0;

  // Reactions:
  // reaction comment PMID: 135486
  re1: NFkB_default + s14 => NFkB_IkB_alpha; kre1p*NFkB_default*s14 - kre1m*NFkB_IkB_alpha;
    kre1p = 0.5; kre1m = 5e-4;
  re2: NFkB_default => NFkB_nucleus; kre2p*NFkB_default;  // modifiers: s30
    kre2p = 1;
  re3: IkB_alpha_nucleus => s14; kre3p*IkB_alpha_nucleus;
    kre3p = 1;
  re5: NFkB_nucleus => IkB_alpha_nucleus + NFkB_nucleus; kre5p*NFkB_nucleus*NFkB_nucleus;
    kre5p = 5e-7;
  // Another reaction comment PMID: 11158
  re16: NFkB_IkB_alpha => $a5_degraded + NFkB_default + Some; kre16p*NFkB_IkB_alpha*Kinase;  // modifiers: Kinase
    kre16p = 1;
  re17: s14 => s20; ;  // modifiers: catalyst, simple
  re18: s20 => sa9_degraded; ;
  re19: 2 s20 => s24; ;
  re20: NFkB_default + s20 => s25; ;
  re21: s32 => s30; ;
  re22: s33 => s32; ;

  // Events:
  ev1: at (s1 > 0.5): p5 = s1*s5; ev1 is "Event1";

  // Unit definitions:
  unit kg = kilogram;
end
